## Sicherheitsblende MIV Servozylinder
z_S := 1  # ...Anzahl der Servozylinder
z_Fkol := 1
# ... Bei Angabe der Kolbenkraft pro Servo:  Eingabe Fkol=2
# ... Bei Angabe der gesamten Kolbenkraft:  Eingabe Fkol=1
D_zyl := 400*mm
d_zyl := 0 mm
A_zyl := (D_zyl^2 - d_zyl^2)/4*π
L_H := [2500; 2200; 2000; 1800; 1600; 1400; 1200; 1000; 800; 600]*mm
F_tot := z_Fkol*[1500; 1500; 1500; 1500; 1500; 1500; 1500; 1500; 1500; 1500]*N
ΔL_H := [
    L_H[0] - L_H[1];
    L_H[1] - L_H[2];
    L_H[2] - L_H[3];
    L_H[3] - L_H[4];
    L_H[4] - L_H[5];
    L_H[5] - L_H[6];
    L_H[6] - L_H[7];
    L_H[7] - L_H[8];
    L_H[8] - L_H[9]
]
ΔL_H = [0.3; 0.2; 0.2; 0.2; 0.2; 0.2; 0.2; 0.2; 0.2] m
Δp := F_tot/(z_S*A_zyl)
Δp = [0.119366; 0.119366; 0.119366; 0.119366; 0.119366; 0.119366; 0.119366; 0.119366; 0.119366; 0.119366] bar
## Blende
d := 1.2 mm  # ... Blendendurchmesser
α := 0.8  # ... Verlustziffer
ζ := 1/α^2 = 1.5625
A_d := π/4*d^2
## Öl
ρ := 800*kg/m^3  # ... Dichte Öl
ρ = 8e-7 kg/mm^3
η := 0.400 Pa*s  # (t_Öl=25°)
η = 4e-7 MPa*s
ν := η/ρ
ν = 0.0005 m^2/s
## Ölleitung
L_L := 10*m  # ... Leitungslänge nach Blende
D_L := 25*mm  # ... Rohrdurchmesser der Leitung nach Blende
## Drossel
k_D := 0*bar/(L/min)
## Rücklauf (Armaturen)
k_R := 0*bar/(L/min)
k_R0 := 0*bar
## Berechnung
Q_solv := α*A_d*sqrt(Δp/ρ)
Δp_Blsolv := Δp/2
Δp_Lsolv := Δp/6
Δp_Rsolv := Δp/6
Δp_Dsolv := Δp/6
Given
α*A_d*sqrt(2*Δp_Blsolv/ρ) - Q_solv/z_S == 0
128*ν*L_L*ρ*Q_solv/(π*D_L^4) - Δp_Lsolv == 0
k_D*Q_solv - Δp_Dsolv == 0
k_R*Q_solv + k_R0 - Δp_Rsolv == 0
Δp - Δp_Blsolv - Δp_Rsolv - Δp_Dsolv - Δp_Lsolv == 0
[Q; Δp_BL; Δp_L; Δp_R; Δp_D] := Find(Q_solv, Δp_Blsolv, Δp_Lsolv, Δp_Rsolv, Δp_Dsolv)
Q = [0.272043; 0.272043; 0.272043; 0.272043; 0.272043; 0.272043; 0.272043; 0.272043; 0.272043; 0.272043] L/min
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Q_ber := [
    (Q[1] + Q[0])/2;
    (Q[2] + Q[1])/2;
    (Q[3] + Q[2])/2;
    (Q[4] + Q[3])/2;
    (Q[5] + Q[4])/2;
    (Q[6] + Q[5])/2;
    (Q[7] + Q[6])/2;
    (Q[8] + Q[7])/2;
    (Q[9] + Q[8])/2
]
Q_ber = [4.53405e-6; 4.53405e-6; 4.53405e-6; 4.53405e-6; 4.53405e-6; 4.53405e-6; 4.53405e-6; 4.53405e-6; 4.53405e-6] m^3/s
ΔL_H = [0.3; 0.2; 0.2; 0.2; 0.2; 0.2; 0.2; 0.2; 0.2] m
t_S := z_S*A_zyl*ΔL_H/Q_ber
Q_ber = [4.53405e-6; 4.53405e-6; 4.53405e-6; 4.53405e-6; 4.53405e-6; 4.53405e-6; 4.53405e-6; 4.53405e-6; 4.53405e-6] m^3/s
A_zyl = 0.125664 m^2
z_S*A_zyl = 0.125664 m^2
z_S = 1
sum(t_S[i], i = 0 .. 8) = 52659.6 s
# ...Schließzeit bei
d = 1.2 mm
z_S*A_zyl*ΔL_H = [37.6991; 25.1327; 25.1327; 25.1327; 25.1327; 25.1327; 25.1327; 25.1327; 25.1327] L
ΔL_H/Q_ber = [66166; 44110.7; 44110.7; 44110.7; 44110.7; 44110.7; 44110.7; 44110.7; 44110.7] s/m^2
v := Q_ber/A_zyl = [3.60808e-5; 3.60808e-5; 3.60808e-5; 3.60808e-5; 3.60808e-5; 3.60808e-5; 3.60808e-5; 3.60808e-5; 3.60808e-5] m/s
sum(t_S[i], i = 0 .. 8) = 52659.6 s
sum(v[i], i = 0 .. 8) = 0.000324727 m/s
